*RESTART, READ
*Step
*Dynamic
1e-05, 0.001, 1e-08, 1e-05
*Cload, OP=NEW
2, 6, -6.165031144e-06
3, 6, -5.141634574e-06
4, 6, -5.402750085e-06
5, 6, -5.597666117e-06
6, 6, -5.424232913e-06
7, 6, -5.096870293e-06
8, 6, -2.471735951e-06
9, 6, -2.095965812e-06
10, 6, -8.548546998e-07
11, 6, -1.970320975e-08
*NODE FILE,OUTPUT=2D
U
*EL PRINT,ELSET=Eall,FREQUENCY=100
S
*RESTART,WRITE,FREQUENCY=1
*END STEP
